// COMSOL Multiphysics 6.0.0.318 model "AOTF.mph"
// Outline of the model tree

Variables
  var1 "V0"
    V0 = 10
  var2 "A0"
    A0 = 41.5

Coordinate systems
  sys1: Boundary "边界坐标系 1" | name = sys
  sys2: VectorBase "基矢坐标系 1" | name = sys11; base = {{0, -sinA0, cosA0}, {0, cosA0, sinA0}, {-1, 0, 0}}
  sys3: VectorBase "基矢坐标系 2" | name = sys12; base = {{cos45, sin45, 0}, {-sin45, cos45, 0}, {0, 0, 1}}

Geometry
  geom1 "AOTF晶体" (3D, length unit µm)
    blk1: Block "LiNbO3" | pos = {0, 0, 10}; base = center; size = {6670, 500, 20}
    blk2: Block "TeO2" | pos = {0, 0, -37.5}; base = center; size = {6670, 500, 75}
    blk3: Block "D" (disabled) | pos = {0, 0, 2.5}; base = center; size = {6670, 500, 5}
    fin: Finalize "AOTF晶体"

Materials
  Pie: Common "LiNbO3" on domains 2
    def "基本"
      thermalconductivity = k(T)
      thermalexpansioncoefficient = (alpha_solid_a_axis_2(T)+(Tempref-293[K])*if(abs(T-Tempref)>1e-3,(alpha_solid_a_axis_2(T)-alpha_solid_a_axis_2(Tempref))/(T-Tempref),d(alpha_solid_a_axis_2(T),T)))/(1+alpha_solid_a_axis_2(Tempref)*(Tempref-293[K]))
      heatcapacity = C(T)
      HC = HC(T)
      density = rho(T)
      TD = TD(T)
      soundspeed = 6090
      k: Piecewise
        arg = T
        pieces = 
          {100.0, 200.0, 46.07227-0.5996639*T^1+0.003112605*T^2-5.647059E-6*T^3}
          {200.0, 400.0, 14.15756-0.07569703*T^1+1.989814E-4*T^2-1.885522E-7*T^3}
        argunit = K
        fununit = W/(m*K)
      alpha_solid_a_axis_2: Piecewise | arg = T; pieces = {293.0, 1300.0, 3.220604E-6+2.070204E-8*T^1-6.337153E-12*T^2}; argunit = K; fununit = 1/K
      C: Piecewise | arg = T; pieces = {100.0, 400.0, -242.458951+5.875382*T^1-0.0127141049*T^2+9.98092782E-6*T^3}; argunit = K; fununit = J/(kg*K)
      HC: Piecewise | arg = T; pieces = {100.0, 400.0, -35.8464911+0.868649445*T^1-0.00187972434*T^2+1.47563613E-6*T^3}; argunit = K; fununit = J/(mol*K)
      rho: Piecewise | arg = T; pieces = {293.0, 1300.0, 4650.962+0.02730353*T^1-2.45515E-4*T^2+8.554136E-8*T^3}; argunit = K; fununit = kg/m^3
      TD: Piecewise | arg = T; pieces = {293.0, 400.0, 7.520482E-6-4.52603E-8*T^1+1.13358E-10*T^2-1.007341E-13*T^3}; argunit = K; fununit = m^2/s
    ThermalExpansion "热膨胀"
      alphatan = CTE_solid_a_axis_2(T)
      dL = (dL_solid_a_axis_2(T)-dL_solid_a_axis_2(Tempref))/(1+dL_solid_a_axis_2(Tempref))
      dL_solid_a_axis_2: Piecewise | arg = T; pieces = {293.0, 1300.0, -9.42077073E-4-2.854E-6*T^1+2.2573E-8*T^2-6.3438E-12*T^3+5.169879E-26*T^4}; argunit = K
      CTE_solid_a_axis_2: Piecewise | arg = T; pieces = {293.0, 1300.0, -2.854E-6+4.5146E-8*T^1-1.90314E-11*T^2}; argunit = K; fununit = 1/K
    Enu "杨氏模量和泊松比"
      E = E(T)
      nu = nu(T)
      E: Piecewise | arg = T; pieces = {200.0, 380.0, 1.619976E11-2.935899E7*T^1}; argunit = K; fununit = Pa
      nu: Piecewise | arg = T; pieces = {200.0, 380.0, 0.261247-4.618843E-7*T^1}; argunit = K
    KG "体积模量和剪切模量"
      K = kappa(T)
      G = mu(T)
      mu: Piecewise | arg = T; pieces = {200.0, 380.0, 6.422162E10-1.161806E7*T^1}; argunit = K; fununit = Pa
      kappa: Piecewise | arg = T; pieces = {200.0, 380.0, 1.130819E11-2.068798E7*T^1}; argunit = K; fununit = Pa
    StressCharge "应力-电荷型"
      cE = {237.6*1000000000, 0, 0, 0, 0, 0, 85.1*1000000000, 0, 0, 0, 0, 0, 109.4*1000000000, 0, 255.7*1000000000, 0, 0, 0, 0, 0, 0, 61.5*1000000000, 0, 0, 0, 0, 0, 0, 0, 0, 0, 0, 0, 0, 0, 41.6*1000000000}
      eES = {0, 0, 1.719, 0, 0, 0, 0, 0, -1.972, 0, 0, 0, 1.719, 0, 0, 0, 0, 0}
      epsilonrS = 34
      eta_cE = {0, 0, 0, 0, 0, 0, 0, 0, 0, 0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}
      eta_eES = {0, 0, 0, 0, 0, 0, 0, 0, 0, 0, 0, 0, 0, 0, 0, 0, 0, 0}
      eta_epsilonS = 0
    RefractiveIndex "折射率"
      n = 2.203
      ki = 0
  Aco: Common "TeO2" on domains 1
    def "Basic"
      density = 6100
      soundspeed = 6200
      relpermittivity = 4.8
    DispersionModelSellmeierStandard "Sellmeier"
      ODsma = {2.584, 1.157, 0, 0.01800964, 0.06959044, 0}
      Trefsma = 22[degC]
      Prefsma = 0
    RefractiveIndex
      ki = 0
    Enu "杨氏模量和泊松比"
      E = 79000000000
      nu = 0.29

Physics
  acpr: PressureAcoustics "压力声学，频域" on domains 1
    dependent variable p
    fpam1: FrequencyPressureAcousticsModel "压力声学 1" (default)
    shb1: SoundHard "硬声场边界（壁） 1" (default)
    init1: init "初始值 1" (default)
    imp1: Impedance "阻抗 1" (disabled) on no boundaries
    efc1: ExteriorFieldCalculation "外场计算 1" on boundaries 4, 5, 9, 11 | SymmetryCondition2 = 1
    pmb1: PerfectlyMatchedBoundary "完美匹配边界 1" on boundaries 7
  solid: SolidMechanics "固体力学" on domains 2
    dependent variable u = {u, v, w}
    lemm1: LinearElasticModel "线弹性材料 1" (default)
    free1: Free "自由 1" (default)
    init1: init "初始值 1" (default)
    pzm1: PiezoelectricMaterialModel "压电材料 1" on domains 2
  es: Electrostatics "静电" on domains 2
    dependent variable V
    ccn1: ChargeConservation "电荷守恒 1" (default)
    zc1: ZeroCharge "零电荷 1" (default)
    init1: init "初始值 1" (default)
    gnd1: Ground "接地 1" on boundaries 7
    pot1: ElectricPotential "电势 1" on boundaries 6 | V0 = V0
    ccnp1: ChargeConservationPiezo "电荷守恒，压电 1" on domains 2
  ewfd: ElectromagneticWavesFrequencyDomain "电磁波，频域" on domains 1
    dependent variable E = {Ex, Ey, Ez}
    wee1: WaveEquationElectric "波动方程，电 1" (default)
    pec1: PerfectElectricConductor "理想电导体 1" (default)
    init1: init "初始值 1" (default) | E = {0, 0, 1}
    port1: Port "端口 1" on boundaries 1 | Thetap = 0; InputType = E; beta = 0; E0 = {0, 0, 1}
    port2: Port "端口 2" on boundaries 10
    sctr1: Scattering "散射边界条件 1" (disabled) on no boundaries

Multiphysics
  asb1: AcousticStructureBoundary "声-结构边界 1" on all boundaries | Acoustics_physics = acpr; Structure_physics = solid
  pze1: PiezoelectricEffect "压电效应 1" on all domains | Solid_physics = solid; Electrostatics_physics = es

Mesh
  mesh1 "网格 1"
    size: MeshSizeDefault "大小" | hmax = 1000; hmin = 187; hcurve = 0.7; hnarrow = 0.4; hgrad = 1.6; hauto = 6
    ftri1: FreeTri "自由三角形网格 1" on no boundaries
    bl1: BndLayer "边界层 1" on entire geometry
      blp: BndLayerProp "边界层属性" on no boundaries

Studies
  std1 "研究 1"
    freq: Frequency "频域 1"
      punit = kHz
      plist = 100
      solve for = {acpr, solid, es}
      activateCoupling = {asb1, on, pze1, on}
      initstudy = zero
  std2 "研究 2"
    freq: Frequency "频域" | punit = GHz; plist = 200; solve for = {ewfd}; activateCoupling = {asb1, off, pze1, off}

Solver configurations
  sol1 "解 1" (study std1)
    v1: Variables "因变量 1"
    s1: Stationary "稳态求解器 1"
      p1: Parametric "参数化 1" | pname = freq; plistarr = 100; punit = kHz; pcontinuationmode = no
      fc1: FullyCoupled "全耦合 1" | linsolver = d1
      d1: Direct "Suggested Direct Solver (pze1_asb1) (已合并) (已合并)"
  sol2 "解 2" (study std2)
    v1: Variables "因变量 1"
    s1: Stationary "稳态求解器 1"
      p1: Parametric "参数化 1" | pname = freq; plistarr = 200; punit = GHz; pcontinuationmode = no
      fc1: FullyCoupled "全耦合 1" | linsolver = i1
      i1: Iterative "建议的迭代求解器 (ewfd)" | linsolver = bicgstab
        mg1: Multigrid "多重网格 1"

Datasets
  dset1: Solution | solution = sol1
  dset2: Solution | solution = sol2

Derived values
  gev1: EvalGlobal "反射率 (ewfd)" | data = dset2; table = tbl1; expr = {ewfd.Rport_1, ewfd.Rtotal}

Plots
  pg1: PlotGroup3D "声压 (acpr)" | data = dset1
    surf1: Surface "表面 1" | expr = acpr.p_t
  pg2: PlotGroup3D "声压级 (acpr)" | data = dset1
    surf1: Surface "表面 1" | expr = acpr.Lp_t
  pg3: PlotGroup3D "声压，等值面 (acpr)" | data = dset1
    iso1: Isosurface "等值面 1" | expr = acpr.p_t
  pg4: PlotGroup3D "应力 (solid)" | data = dset1
    vol1: Volume "体 1" | expr = solid.mises_peak
      def: Deform "变形" | expr = {u, v, w}; descr = 位移场
  pg5: PlotGroup3D "电势 (es)" | data = dset1
    mslc1: Multislice "多切面 1"
      expr = V
      multiplanexmethod = coord
      xcoord = es.CPx
      multiplaneymethod = coord
      ycoord = es.CPy
      multiplanezmethod = coord
      zcoord = es.CPz
    strmsl1: StreamlineMultislice "流线多切面 1"
      expr = {es.Ex, es.Ey, es.Ez}
      multiplanexmethod = coord
      xcoord = es.CPx
      multiplaneymethod = coord
      ycoord = es.CPy
      multiplanezmethod = coord
      zcoord = es.CPz
      udist = 0.02
      col1: Color "颜色表达式 1" | expr = V
      filt1: Filter "过滤器 1" | expr = !isScalingSystemDomain
  pg6: PlotGroup3D "电场模 (es)" | data = dset1
    mslc1: Multislice "多切面 1"
      expr = es.normE
      multiplanexmethod = coord
      xcoord = es.CPx
      multiplaneymethod = coord
      ycoord = es.CPy
      multiplanezmethod = coord
      zcoord = es.CPz
    strmsl1: StreamlineMultislice "流线多切面 1"
      expr = {es.Ex, es.Ey, es.Ez}
      multiplanexmethod = coord
      xcoord = es.CPx
      multiplaneymethod = coord
      ycoord = es.CPy
      multiplanezmethod = coord
      zcoord = es.CPz
      udist = 0.02
      col1: Color "颜色表达式 1" | expr = es.normE
      filt1: Filter "过滤器 1" | expr = !isScalingSystemDomain
  pg7: PlotGroup3D "电场 (ewfd)" | data = dset2
    mslc1: Multislice "多切面 1" | expr = ewfd.normE